*NODE,NSET=Nall
1, 2.77163859753, -1.1480502971, 0.0
2, 2.77163859753, 0.0, 0.0
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*ELEMENT,TYPE=B32
1, 1, 2, 3
2, 3, 4, 5
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*ELSET,ELSET=ES1
1,18,35,52,69
*ELSET,ELSET=ES2
2,19,36,53,70,256,281
*ELSET,ELSET=ES3
3,20,37,54,71,241,242,243,244,255,277
*ELSET,ELSET=ES4
4,21,38,55,72,265,273
*ELSET,ELSET=ES5
5,22,39,56,65,245,246,247,269
*ELSET,ELSET=ES6
6,23,40,49,66,262
*ELSET,ELSET=ES7
7,24,33,50,67,261
*ELSET,ELSET=ES8
8,17,34,51,68,259
*ELSET,ELSET=ES9
9,26,43,60,258
*ELSET,ELSET=ES10
10,27,44,61,257
*ELSET,ELSET=ES11
11,28,45,62,279
*ELSET,ELSET=ES12
12,29,46,63,254,275
*ELSET,ELSET=ES13
13,30,47,64,264,271,282,283,284,285
*ELSET,ELSET=ES14
14,31,48,57,263,267
*ELSET,ELSET=ES15
15,32,41,58,286,287,288
*ELSET,ELSET=ES16
16,25,42,59,260
*ELSET,ELSET=ES17
73,98,107,132,149
*ELSET,ELSET=ES18
74,99,108,133,144,145,146
*ELSET,ELSET=ES19
75,100,109,134,151
*ELSET,ELSET=ES20
76,101,110,135,148
*ELSET,ELSET=ES21
77,102,111,136,155,156,157
*ELSET,ELSET=ES22
78,103,112,121,150
*ELSET,ELSET=ES23
79,104,113,122,161
*ELSET,ELSET=ES24
80,89,114,123,152,153,154
*ELSET,ELSET=ES25
81,90,115,124,163
*ELSET,ELSET=ES26
82,91,116,125,158,159,160
*ELSET,ELSET=ES27
83,92,117,126,137
*ELSET,ELSET=ES28
84,93,118,127,162
*ELSET,ELSET=ES29
85,94,119,128,141,142,143
*ELSET,ELSET=ES30
86,95,120,129,164
*ELSET,ELSET=ES31
87,96,105,130,147
*ELSET,ELSET=ES32
88,97,106,131,138,139,140
*ELSET,ELSET=ES33
165,166,167,208,223
*ELSET,ELSET=ES34
168,169,170,209,224
*ELSET,ELSET=ES35
171,210,225
*ELSET,ELSET=ES36
172,211,226
*ELSET,ELSET=ES37
173,212,213,214,227
*ELSET,ELSET=ES38
174,215,216,217,228
*ELSET,ELSET=ES39
175,218,219,220,229
*ELSET,ELSET=ES40
176,177,178,193,230
*ELSET,ELSET=ES41
179,180,181,194,231
*ELSET,ELSET=ES42
182,183,184,195,232
*ELSET,ELSET=ES43
185,196,233
*ELSET,ELSET=ES44
186,197,234
*ELSET,ELSET=ES45
187,198,199,200,235
*ELSET,ELSET=ES46
188,201,202,203,236
*ELSET,ELSET=ES47
189,204,205,206,221
*ELSET,ELSET=ES48
190,191,192,207,222
*ELSET,ELSET=ES49
237
*ELSET,ELSET=ES50
238
*ELSET,ELSET=ES51
239
*ELSET,ELSET=ES52
240
*ELSET,ELSET=ES53
248,252
*ELSET,ELSET=ES54
249
*ELSET,ELSET=ES55
250
*ELSET,ELSET=ES56
251,253
*ELSET,ELSET=ES57
266
*ELSET,ELSET=ES58
268
*ELSET,ELSET=ES59
270
*ELSET,ELSET=ES60
272
*ELSET,ELSET=ES61
274
*ELSET,ELSET=ES62
276
*ELSET,ELSET=ES63
278
*ELSET,ELSET=ES64
280
*ELSET,ELSET=ES65
289,291,293
*ELSET,ELSET=ES66
290
*ELSET,ELSET=ES67
292,294
*ELSET,ELSET=EAll,GENERATE
1,294
*BOUNDARY
1,1,3
3,1,3
5,1,3
7,1,3
9,1,3
11,1,3
13,1,3
15,1,3
346,1,3
348,1,3
350,1,3
352,1,3
*MATERIAL,NAME=WOOD
*ELASTIC,TYPE=ENGINEERING CONSTANTS
1.8E8,6.9E6,6.9E6,.337,.337,.372,8.1E6,8.1E6
9.E5
*DENSITY
34.
*MATERIAL,NAME=ACRY
*ELASTIC
6.0E7,.37
*DENSITY
74.3
*ORIENTATION,NAME=O1
0.0,1.0,0.0,0,0,1
*ORIENTATION,NAME=O2
-0.707106781187,0.707106781187,0.0,0,0,1
*ORIENTATION,NAME=O3
-1.0,0.0,0.0,0,0,1
*ORIENTATION,NAME=O4
-0.707106781187,-0.707106781187,0.0,0,0,1
*ORIENTATION,NAME=O5
0.0,-1.0,0.0,0,0,1
*ORIENTATION,NAME=O6
0.707106781187,-0.707106781187,0.0,0,0,1
*ORIENTATION,NAME=O7
1.0,-3.86820343128e-16,0.0,0,0,1
*ORIENTATION,NAME=O8
0.707106781187,0.707106781187,0.0,0,0,1
*ORIENTATION,NAME=O9
0.382683432365,0.923879532511,0.0,0,0,1
*ORIENTATION,NAME=O10
-0.382683432365,0.923879532511,0.0,0,0,1
*ORIENTATION,NAME=O11
-0.923879532511,0.382683432365,0.0,0,0,1
*ORIENTATION,NAME=O12
-0.923879532511,-0.382683432365,0.0,0,0,1
*ORIENTATION,NAME=O13
-0.382683432365,-0.923879532511,0.0,0,0,1
*ORIENTATION,NAME=O14
0.382683432365,-0.923879532511,0.0,0,0,1
*ORIENTATION,NAME=O15
0.923879532511,-0.382683432365,0.0,0,0,1
*ORIENTATION,NAME=O16
0.923879532511,0.382683432365,0.0,0,0,1
*ORIENTATION,NAME=O17
-0.305523837997,-0.457248736579,0.835211815836,0,0,1
*ORIENTATION,NAME=O18
0.107285704662,0.539361659986,0.835211815836,0,0,1
*ORIENTATION,NAME=O19
0.107285704662,-0.539361659986,0.835211815836,0,0,1
*ORIENTATION,NAME=O20
-0.305523837997,0.457248736579,0.835211815836,0,0,1
*ORIENTATION,NAME=O21
0.457248736579,-0.305523837997,0.835211815836,0,0,1
*ORIENTATION,NAME=O22
-0.539361659986,0.107285704662,0.835211815836,0,0,1
*ORIENTATION,NAME=O23
0.539361659986,0.107285704662,0.835211815836,0,0,1
*ORIENTATION,NAME=O24
-0.457248736579,-0.305523837997,0.835211815836,0,0,1
*ORIENTATION,NAME=O25
0.305523837997,0.457248736579,0.835211815836,0,0,1
*ORIENTATION,NAME=O26
-0.107285704662,-0.539361659986,0.835211815836,0,0,1
*ORIENTATION,NAME=O27
-0.107285704662,0.539361659986,0.835211815836,0,0,1
*ORIENTATION,NAME=O28
0.305523837997,-0.457248736579,0.835211815836,0,0,1
*ORIENTATION,NAME=O29
-0.457248736579,0.305523837997,0.835211815836,0,0,1
*ORIENTATION,NAME=O30
0.539361659986,-0.107285704662,0.835211815836,0,0,1
*ORIENTATION,NAME=O31
-0.539361659986,-0.107285704662,0.835211815836,0,0,1
*ORIENTATION,NAME=O32
0.457248736579,0.305523837997,0.835211815836,0,0,1
*ORIENTATION,NAME=O33
-0.223303359074,0.334197094013,0.915668014173,0,0,1
*ORIENTATION,NAME=O34
0.334197094013,-0.223303359074,0.915668014173,0,0,1
*ORIENTATION,NAME=O35
-0.394212350892,0.0784137119662,0.915668014173,0,0,1
*ORIENTATION,NAME=O36
0.394212350892,0.0784137119662,0.915668014173,0,0,1
*ORIENTATION,NAME=O37
-0.334197094013,-0.223303359074,0.915668014173,0,0,1
*ORIENTATION,NAME=O38
0.223303359074,0.334197094013,0.915668014173,0,0,1
*ORIENTATION,NAME=O39
-0.0784137119662,-0.394212350892,0.915668014173,0,0,1
*ORIENTATION,NAME=O40
-0.0784137119662,0.394212350892,0.915668014173,0,0,1
*ORIENTATION,NAME=O41
0.223303359074,-0.334197094013,0.915668014173,0,0,1
*ORIENTATION,NAME=O42
-0.334197094013,0.223303359074,0.915668014173,0,0,1
*ORIENTATION,NAME=O43
0.394212350892,-0.0784137119662,0.915668014173,0,0,1
*ORIENTATION,NAME=O44
-0.394212350892,-0.0784137119662,0.915668014173,0,0,1
*ORIENTATION,NAME=O45
0.334197094013,0.223303359074,0.915668014173,0,0,1
*ORIENTATION,NAME=O46
-0.223303359074,-0.334197094013,0.915668014173,0,0,1
*ORIENTATION,NAME=O47
0.0784137119662,0.394212350892,0.915668014173,0,0,1
*ORIENTATION,NAME=O48
0.0784137119662,-0.394212350892,0.915668014173,0,0,1
*ORIENTATION,NAME=O49
0.31186990083,-0.75292054428,-0.57952378636,0,0,1
*ORIENTATION,NAME=O50
0.75292054428,0.31186990083,-0.57952378636,0,0,1
*ORIENTATION,NAME=O51
-0.31186990083,0.75292054428,-0.57952378636,0,0,1
*ORIENTATION,NAME=O52
-0.75292054428,-0.31186990083,-0.57952378636,0,0,1
*ORIENTATION,NAME=O53
0.791641355708,-0.209898404068,-0.57380016025,0,0,1
*ORIENTATION,NAME=O54
0.849579830293,0.253291733969,-0.462663386776,0,0,1
*ORIENTATION,NAME=O55
0.748106203129,-0.359986839408,-0.557446485586,0,0,1
*ORIENTATION,NAME=O56
0.42931753549,0.6149363195,-0.661467895427,0,0,1
*ORIENTATION,NAME=O57
0.114834409104,0.816653170836,-0.565588770264,0,0,1
*ORIENTATION,NAME=O58
0.0106741462277,0.758631386493,-0.651432638137,0,0,1
*BEAM SECTION,ELSET=ES1,MATERIAL=WOOD,SECTION=RECT,ORIENTATION=O1
.292,.125
*BEAM SECTION,ELSET=ES2,MATERIAL=WOOD,SECTION=RECT,ORIENTATION=O2
.292,.125
*BEAM SECTION,ELSET=ES3,MATERIAL=WOOD,SECTION=RECT,ORIENTATION=O3
.292,.125
*BEAM SECTION,ELSET=ES4,MATERIAL=WOOD,SECTION=RECT,ORIENTATION=O4
.292,.125
*BEAM SECTION,ELSET=ES5,MATERIAL=WOOD,SECTION=RECT,ORIENTATION=O5
.292,.125
*BEAM SECTION,ELSET=ES6,MATERIAL=WOOD,SECTION=RECT,ORIENTATION=O6
.292,.125
*BEAM SECTION,ELSET=ES7,MATERIAL=WOOD,SECTION=RECT,ORIENTATION=O7
.292,.125
*BEAM SECTION,ELSET=ES8,MATERIAL=WOOD,SECTION=RECT,ORIENTATION=O8
.292,.125
*BEAM SECTION,ELSET=ES9,MATERIAL=WOOD,SECTION=RECT,ORIENTATION=O9
.292,.125
*BEAM SECTION,ELSET=ES10,MATERIAL=WOOD,SECTION=RECT,ORIENTATION=O10
.292,.125
*BEAM SECTION,ELSET=ES11,MATERIAL=WOOD,SECTION=RECT,ORIENTATION=O11
.292,.125
*BEAM SECTION,ELSET=ES12,MATERIAL=WOOD,SECTION=RECT,ORIENTATION=O12
.292,.125
*BEAM SECTION,ELSET=ES13,MATERIAL=WOOD,SECTION=RECT,ORIENTATION=O13
.292,.125
*BEAM SECTION,ELSET=ES14,MATERIAL=WOOD,SECTION=RECT,ORIENTATION=O14
.292,.125
*BEAM SECTION,ELSET=ES15,MATERIAL=WOOD,SECTION=RECT,ORIENTATION=O15
.292,.125
*BEAM SECTION,ELSET=ES16,MATERIAL=WOOD,SECTION=RECT,ORIENTATION=O16
.292,.125
*BEAM SECTION,ELSET=ES17,MATERIAL=WOOD,SECTION=RECT,ORIENTATION=O17
.292,.125
*BEAM SECTION,ELSET=ES18,MATERIAL=WOOD,SECTION=RECT,ORIENTATION=O18
.292,.125
*BEAM SECTION,ELSET=ES19,MATERIAL=WOOD,SECTION=RECT,ORIENTATION=O19
.292,.125
*BEAM SECTION,ELSET=ES20,MATERIAL=WOOD,SECTION=RECT,ORIENTATION=O20
.292,.125
*BEAM SECTION,ELSET=ES21,MATERIAL=WOOD,SECTION=RECT,ORIENTATION=O21
.292,.125
*BEAM SECTION,ELSET=ES22,MATERIAL=WOOD,SECTION=RECT,ORIENTATION=O22
.292,.125
*BEAM SECTION,ELSET=ES23,MATERIAL=WOOD,SECTION=RECT,ORIENTATION=O23
.292,.125
*BEAM SECTION,ELSET=ES24,MATERIAL=WOOD,SECTION=RECT,ORIENTATION=O24
.292,.125
*BEAM SECTION,ELSET=ES25,MATERIAL=WOOD,SECTION=RECT,ORIENTATION=O25
.292,.125
*BEAM SECTION,ELSET=ES26,MATERIAL=WOOD,SECTION=RECT,ORIENTATION=O26
.292,.125
*BEAM SECTION,ELSET=ES27,MATERIAL=WOOD,SECTION=RECT,ORIENTATION=O27
.292,.125
*BEAM SECTION,ELSET=ES28,MATERIAL=WOOD,SECTION=RECT,ORIENTATION=O28
.292,.125
*BEAM SECTION,ELSET=ES29,MATERIAL=WOOD,SECTION=RECT,ORIENTATION=O29
.292,.125
*BEAM SECTION,ELSET=ES30,MATERIAL=WOOD,SECTION=RECT,ORIENTATION=O30
.292,.125
*BEAM SECTION,ELSET=ES31,MATERIAL=WOOD,SECTION=RECT,ORIENTATION=O31
.292,.125
*BEAM SECTION,ELSET=ES32,MATERIAL=WOOD,SECTION=RECT,ORIENTATION=O32
.292,.125
*BEAM SECTION,ELSET=ES33,MATERIAL=WOOD,SECTION=RECT,ORIENTATION=O33
.292,.125
*BEAM SECTION,ELSET=ES34,MATERIAL=WOOD,SECTION=RECT,ORIENTATION=O34
.292,.125
*BEAM SECTION,ELSET=ES35,MATERIAL=WOOD,SECTION=RECT,ORIENTATION=O35
.292,.125
*BEAM SECTION,ELSET=ES36,MATERIAL=WOOD,SECTION=RECT,ORIENTATION=O36
.292,.125
*BEAM SECTION,ELSET=ES37,MATERIAL=WOOD,SECTION=RECT,ORIENTATION=O37
.292,.125
*BEAM SECTION,ELSET=ES38,MATERIAL=WOOD,SECTION=RECT,ORIENTATION=O38
.292,.125
*BEAM SECTION,ELSET=ES39,MATERIAL=WOOD,SECTION=RECT,ORIENTATION=O39
.292,.125
*BEAM SECTION,ELSET=ES40,MATERIAL=WOOD,SECTION=RECT,ORIENTATION=O40
.292,.125
*BEAM SECTION,ELSET=ES41,MATERIAL=WOOD,SECTION=RECT,ORIENTATION=O41
.292,.125
*BEAM SECTION,ELSET=ES42,MATERIAL=WOOD,SECTION=RECT,ORIENTATION=O42
.292,.125
*BEAM SECTION,ELSET=ES43,MATERIAL=WOOD,SECTION=RECT,ORIENTATION=O43
.292,.125
*BEAM SECTION,ELSET=ES44,MATERIAL=WOOD,SECTION=RECT,ORIENTATION=O44
.292,.125
*BEAM SECTION,ELSET=ES45,MATERIAL=WOOD,SECTION=RECT,ORIENTATION=O45
.292,.125
*BEAM SECTION,ELSET=ES46,MATERIAL=WOOD,SECTION=RECT,ORIENTATION=O46
.292,.125
*BEAM SECTION,ELSET=ES47,MATERIAL=WOOD,SECTION=RECT,ORIENTATION=O47
.292,.125
*BEAM SECTION,ELSET=ES48,MATERIAL=WOOD,SECTION=RECT,ORIENTATION=O48
.292,.125
*BEAM SECTION,ELSET=ES49,MATERIAL=WOOD,SECTION=RECT,ORIENTATION=O49
.292,.292
*BEAM SECTION,ELSET=ES50,MATERIAL=WOOD,SECTION=RECT,ORIENTATION=O50
.292,.292
*BEAM SECTION,ELSET=ES51,MATERIAL=WOOD,SECTION=RECT,ORIENTATION=O51
.292,.292
*BEAM SECTION,ELSET=ES52,MATERIAL=WOOD,SECTION=RECT,ORIENTATION=O52
.292,.292
*BEAM SECTION,ELSET=ES53,MATERIAL=WOOD,SECTION=RECT,ORIENTATION=O53
.292,.125
*BEAM SECTION,ELSET=ES54,MATERIAL=WOOD,SECTION=RECT,ORIENTATION=O54
.292,.125
*BEAM SECTION,ELSET=ES55,MATERIAL=WOOD,SECTION=RECT,ORIENTATION=O55
.292,.125
*BEAM SECTION,ELSET=ES56,MATERIAL=WOOD,SECTION=RECT,ORIENTATION=O50
.292,.125
*BEAM SECTION,ELSET=ES57,MATERIAL=ACRY,SECTION=RECT,ORIENTATION=O10
.592,.833
*BEAM SECTION,ELSET=ES58,MATERIAL=ACRY,SECTION=RECT,ORIENTATION=O1
.592,.833
*BEAM SECTION,ELSET=ES59,MATERIAL=ACRY,SECTION=RECT,ORIENTATION=O9
.592,.833
*BEAM SECTION,ELSET=ES60,MATERIAL=ACRY,SECTION=RECT,ORIENTATION=O8
.592,.833
*BEAM SECTION,ELSET=ES61,MATERIAL=ACRY,SECTION=RECT,ORIENTATION=O16
.592,.833
*BEAM SECTION,ELSET=ES62,MATERIAL=ACRY,SECTION=RECT,ORIENTATION=O7
.592,.833
*BEAM SECTION,ELSET=ES63,MATERIAL=ACRY,SECTION=RECT,ORIENTATION=O15
.592,.833
*BEAM SECTION,ELSET=ES64,MATERIAL=ACRY,SECTION=RECT,ORIENTATION=O6
.592,.833
*BEAM SECTION,ELSET=ES65,MATERIAL=WOOD,SECTION=RECT,ORIENTATION=O56
.292,.125
*BEAM SECTION,ELSET=ES66,MATERIAL=WOOD,SECTION=RECT,ORIENTATION=O57
.292,.125
*BEAM SECTION,ELSET=ES67,MATERIAL=WOOD,SECTION=RECT,ORIENTATION=O58
.292,.125
*STEP
*STATIC
*DLOAD
EAll,GRAV,3.22E1,0.,0.,-1.
*CLOAD
354,3,-209.439510239
356,3,-418.879020479
358,3,-418.879020479
360,3,-209.439510239
353,3,-418.879020479
355,3,-837.758040957
357,3,-837.758040957
359,3,-418.879020479
75,3,-209.439510239
77,3,-418.879020479
79,3,-418.879020479
65,3,-209.439510239
382,3,-200.
383,3,-200.
385,3,-200.
386,3,-200.
388,3,-200.
389,3,-200.
391,3,-200.
392,3,-200.
394,3,-200.
395,3,-200.
397,3,-200.
398,3,-200.
400,3,-200.
401,3,-200.
403,3,-200.
404,3,-200.
407,3,-117.80972451
409,3,-235.619449019
411,3,-235.619449019
413,3,-117.80972451
406,3,-235.619449019
408,3,-471.238898038
410,3,-471.238898038
412,3,-235.619449019
113,3,-117.80972451
115,3,-235.619449019
117,3,-235.619449019
119,3,-117.80972451
*EL PRINT,ELSET=ETwoFour
S
*EL PRINT,ELSET=ETwoTen
S
*EL FILE
S
*NODE FILE
U
*END STEP
